OpenVSP model (file version 5), 6 components.
Geometry view with OpenVSP parameter names; values to 6 digits, angles in degrees, lengths in the model's unit.
Overall bounding box: X_Min=-14.33 X_Len=42.7409 Y_Min=-25.6907 Y_Len=51.3813 Z_Min=-4.54718 Z_Len=8.78524

Wing "Wing"
  location (X Y Z) -0.88 0 0, rotation 0 0 0
  symmetric about XZ
  bounding box size 16.8967 51.3813 1.25002
  totals: TotalSpan=52.6407 TotalProjectedSpan=51.3247 TotalChord=2.08101 TotalArea=153.218 TotalAR=17.1927
  root: chord 4.13731, twist 0, airfoil file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 BaseThickChord=0.140042 ThickChord=0.140042
  sections:
    n  Span     Root_Chord  Tip_Chord  Area     Sweep  Sweep_Location  Dihedral  Twist  Twist_Location  tip airfoil
    1  25.3204  4.13731     1.82042    75.4259  30     0               0         0      0.25            as above
    2  1        1.82042     0.545902   1.18316  60     0               70        0      0.25            airfoil file "NASA SC(2)-0010"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 BaseThickChord=0.100015 ThickChord=0.100015

Wing "Strut", child of "Wing"
  location (X Y Z) -0.88 0 -4.37, rotation 0 0 0; relative location 0 0 -4.37, rotation 0 0 0
  symmetric about XZ
  bounding box size 12.1127 35.5555 4.51519
  totals: TotalSpan=37.9862 TotalProjectedSpan=35.4407 TotalChord=1.98552 TotalArea=74.6702 TotalAR=16.8213
  root: chord 3.54299, twist 0, airfoil file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 BaseThickChord=0.100098 ThickChord=0.100098
  sections:
    n  Span      Root_Chord  Tip_Chord  Area      Sweep  Sweep_Location  Dihedral  Twist  Twist_Location  tip airfoil
    1  3         3.54299     2.48009    9.03463   30     0               0         0      0.25            as above
    2  15.1235   2.48009     1.13148    27.3097   30     0               13.258    0      0.25            as above
    3  0.869648  1.13148     1.14698    0.990729  30     0               90        0      0.25            as above

Duct "Duct", child of "Wing"
  location (X Y Z) -3.33333 6.4 -1.66667, rotation 0 0 0
  symmetric about XZ
  bounding box size 5 16.0645 3.30896
  Design: Camber=0 CamberLoc=0.2 Chord=5 Height=2.864 InvertFlag=0 Shape=0 ThickChord=0.08 Width=2.864
  custom script Duct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

Fuselage "Fuselage"
  location (X Y Z) -14.33 0 -2.1, rotation 0 0 0
  bounding box size 42.7156 3.90406 4.54917
  mass: Density=1 Shell_Flag=1 Mass_Area=1 Mass_Prior=1
  Design: Length=42.6
  cross sections:
    n   XLocPercent  YLocPercent  ZLocPercent  shape
    0   0            0            -0.015       point
    1   0.0103372    0            -0.014       circle Circle_Diameter=1.29709
    2   0.0329607    0            -0.013       circle Circle_Diameter=2.20124
    3   0.053468     0            -0.0062      circle Circle_Diameter=3.15
    4   0.0773531    0            -0.0027      circle Circle_Diameter=3.61972
    5   0.128608     0            0            super ellipse Super_Height=4.37 Super_M=2 Super_MaxWidthLoc=0.163636 Super_N=2 Super_Width=3.9
    6   0.625        0            0            as above
    7   0.751174     0            0            as above
    8   0.875        0            0.0142       circle Circle_Diameter=2.96909
    9   0.944639     0            0.029        circle Circle_Diameter=1.68955
    10  0.977133     0            0.037        circle Circle_Diameter=0.956715
    11  1            0            0.043        circle Circle_Diameter=0.347107

Wing "VerticalTail"
  location (X Y Z) 21.27 0 0.04, rotation 90 0 0
  bounding box size 5.61515 0.368703 4.19806
  totals: TotalSpan=4.053 TotalProjectedSpan=4.053 TotalChord=3.68455 TotalArea=14.9335 TotalAR=1.1
  root: chord 4.09394, twist 0, airfoil file "NACA 63012"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 BaseThickChord=0.0900282 ThickChord=0.0900282
  sections:
    n  Span   Root_Chord  Tip_Chord  Area     Sweep  Sweep_Location  Dihedral  Twist  Twist_Location  tip airfoil
    1  4.053  4.09394     3.27515    14.9335  30     0               0         0      0.25            NACA 4-series Camber=0 CamberLoc=0.2 ThickChord=0.1

Wing "HorizontalTail", child of "VerticalTail"
  location (X Y Z) 23.5876 0 4, rotation 0 0 0
  symmetric about XZ
  bounding box size 4.82241 7.348 0.262859
  totals: TotalSpan=7.348 TotalProjectedSpan=7.348 TotalChord=2.44933 TotalArea=17.9977 TotalAR=3
  root: chord 2.64793, twist -3.125, airfoil file "NACA 0009"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 BaseThickChord=0.0900282 ThickChord=0.0900282
  sections:
    n  Span   Root_Chord  Tip_Chord  Area     Sweep  Sweep_Location  Dihedral  Twist  Twist_Location  tip airfoil
    1  3.674  2.64793     2.25074    8.99885  35     0               0         0      0.25            NACA 4-series Camber=0 CamberLoc=0.2 ThickChord=0.1

User parameters
  Default_Group:Default_Name = 0.738255  (Default_Desc)

VSPAERO settings: Sref=227.888 bref=52.6407 cref=2.08101 Xcg=5.89953 Ycg=2.51809e-07 Zcg=-1.89907 AlphaStart=-2 AlphaEnd=14 AlphaNpts=17 BetaStart=0 BetaEnd=0 BetaNpts=1 MachStart=0.78 MachEnd=0 MachNpts=1 ReCref=1.5e+07 Vinf=230 Rho=0.3639
  control group "Unnamed Control Group": DeflectionAngle=20
